OpenVSP model (file version 5), 4 components.
Geometry view with OpenVSP parameter names; values to 6 digits, angles in degrees, lengths in the model's unit.
Overall bounding box: X_Min=-0.00202226 X_Len=51.7574 Y_Min=-17.8967 Y_Len=35.7934 Z_Min=-3.02576 Z_Len=11.6759

Wing "htp"
  location (X Y Z) 44.9161 0 1.42, rotation 0 0 0
  symmetric about XZ
  bounding box size 6.83929 15.952 0.583931
  totals: TotalSpan=15.9617 TotalProjectedSpan=15.952 TotalChord=3.05301 TotalArea=48.7311 TotalAR=5.22182 MAC=3.34807
  root: chord 4.69693, twist 0, airfoil file "htp_Sec1_Elem1"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 BaseThickChord=0.100025 ThickChord=0.100025
  sections:
    n  Span     Root_Chord  Tip_Chord  Area     Sweep    Sweep_Location  Dihedral  Twist  Twist_Location  tip airfoil
    1  7.98084  4.69693     1.40908    24.3656  34.2316  0               2         0      0               airfoil file "htp_Sec2_Elem1"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 BaseThickChord=0.100025 ThickChord=0.100025

Wing "vtp"
  location (X Y Z) 43.7045 0 1.704, rotation 90 0 0
  bounding box size 7.99863 0.59105 6.94619
  totals: TotalSpan=6.94619 TotalProjectedSpan=6.94619 TotalChord=3.98824 TotalArea=27.7031 TotalAR=1.74167 MAC=4.29643
  root: chord 5.90851, twist 0, airfoil file "vtp_Sec1_Elem1"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 BaseThickChord=0.100025 ThickChord=0.100025
  sections:
    n  Span     Root_Chord  Tip_Chord  Area     Sweep    Sweep_Location  Dihedral  Twist  Twist_Location  tip airfoil
    1  6.94619  5.90851     2.06798    27.7031  40.4907  0               0         0      0               airfoil file "vtp_Sec2_Elem1"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 BaseThickChord=0.100025 ThickChord=0.100025

Wing "wing"
  location (X Y Z) 17.8772 0 -2.47319, rotation 0 4 0
  symmetric about XZ
  bounding box size 9.05644 35.7934 0.857892
  totals: TotalSpan=35.8118 TotalProjectedSpan=35.7934 TotalChord=4.33377 TotalArea=122.655 TotalAR=10.4453 MAC=4.10789
  root: chord 5.73117, twist 0, airfoil file "wing_Sec1_Elem1"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 BaseThickChord=0.139796 ThickChord=0.139796
  sections:
    n  Span     Root_Chord  Tip_Chord  Area     Sweep    Sweep_Location  Dihedral  Twist  Twist_Location  tip airfoil
    1  2.84     5.73117     5.73117    16.2765  0        0               0         0      0               airfoil file "wing_Sec2_Elem1"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 BaseThickChord=0.139762 ThickChord=0.139762
    2  3.42594  5.73117     3.90435    16.5053  28.0825  0               2         -2.1   0               airfoil file "wing_Sec3_Elem1"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 BaseThickChord=0.11181 ThickChord=0.11181
    3  11.64    3.90435     1.00041    28.5456  28.0825  0               2         -6     0               airfoil file "wing_Sec4_Elem1"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 BaseThickChord=0.11181 ThickChord=0.11181

Fuselage "fuselage"
  location (X Y Z) 0 0 0, rotation 0 0 0
  bounding box size 49.7729 5.68 5.68006
  Design: Length=49.613
  cross sections:
    n   XLocPercent  YLocPercent  ZLocPercent   shape
    0   0            0            -0.0200099    point
    1   0.00179835   0            -0.0205022    ellipse Ellipse_Height=0.748624 Ellipse_Width=0.914594
    2   0.0044902    0            -0.0202743    ellipse Ellipse_Height=1.18439 Ellipse_Width=1.39194
    3   0.00717261   0            -0.0201564    ellipse Ellipse_Height=1.49997 Ellipse_Width=1.68821
    4   0.0105483    0            -0.0198782    ellipse Ellipse_Height=1.8276 Ellipse_Width=1.993
    5   0.0121143    0            -0.0197214    ellipse Ellipse_Height=1.95687 Ellipse_Width=2.12534
    6   0.0143603    0            -0.0196206    ellipse Ellipse_Height=2.11307 Ellipse_Width=2.29211
    7   0.0181724    0            -0.0193275    ellipse Ellipse_Height=2.3455 Ellipse_Width=2.53941
    8   0.0224321    0            -0.0190917    ellipse Ellipse_Height=2.55986 Ellipse_Width=2.76661
    9   0.0273776    0            -0.0188719    ellipse Ellipse_Height=2.78331 Ellipse_Width=3.03982
    10  0.0330862    0            -0.0184208    ellipse Ellipse_Height=2.98268 Ellipse_Width=3.32462
    11  0.0372458    0            -0.0172038    ellipse Ellipse_Height=3.21181 Ellipse_Width=3.49138
    12  0.041957     0            -0.0159571    ellipse Ellipse_Height=3.44685 Ellipse_Width=3.68121
    13  0.0473332    0            -0.0138162    ellipse Ellipse_Height=3.75777 Ellipse_Width=3.87103
    14  0.0520444    0            -0.0121619    ellipse Ellipse_Height=4.01531 Ellipse_Width=4.02632
    15  0.0574357    0            -0.0104755    ellipse Ellipse_Height=4.28136 Ellipse_Width=4.18162
    16  0.0639415    0            -0.00889557   ellipse Ellipse_Height=4.52457 Ellipse_Width=4.35997
    17  0.072699     0            -0.00731566   ellipse Ellipse_Height=4.78972 Ellipse_Width=4.57274
    18  0.0839141    0            -0.00597618   ellipse Ellipse_Height=5.04554 Ellipse_Width=4.81141
    19  0.0966971    0            -0.00490344   ellipse Ellipse_Height=5.26059 Ellipse_Width=5.06168
    20  0.10948      0            -0.00403335   ellipse Ellipse_Height=5.40804 Ellipse_Width=5.24003
    21  0.123844     0            -0.00343      ellipse Ellipse_Height=5.49154 Ellipse_Width=5.40679
    22  0.142468     0            -0.00288848   ellipse Ellipse_Height=5.59423 Ellipse_Width=5.55924
    23  0.157712     0            -0.00268355   ellipse Ellipse_Height=5.63967 Ellipse_Width=5.64547
    24  0.167817     0            -0.00257937   ellipse Ellipse_Height=5.66262 Ellipse_Width=5.68
    25  0.178815     0            -0.00257823   ellipse Ellipse_Height=5.67364 Ellipse_Width=5.68
    26  0.188902     0            -0.00264005   ellipse Ellipse_Height=5.68 Ellipse_Width=5.68
    27  0.270981     0            -0.00264005   as above
    28  0.353061     0            -0.00264005   as above
    29  0.43514      0            -0.00264005   as above
    30  0.517219     0            -0.00264005   as above
    31  0.599299     0            -0.00264005   as above
    32  0.62302      0            -0.00264119   as above
    33  0.63769      0            -0.00259082   ellipse Ellipse_Height=5.67512 Ellipse_Width=5.68
    34  0.652388     0            -0.00231147   ellipse Ellipse_Height=5.6474 Ellipse_Width=5.68
    35  0.667053     0            -0.00185468   ellipse Ellipse_Height=5.60207 Ellipse_Width=5.68
    36  0.681723     0            -0.00121813   ellipse Ellipse_Height=5.53891 Ellipse_Width=5.68
    37  0.696421     0            -0.000421309  ellipse Ellipse_Height=5.45984 Ellipse_Width=5.68
    38  0.711086     0            0.000478552   ellipse Ellipse_Height=5.36317 Ellipse_Width=5.67421
    39  0.725784     0            0.00147687    ellipse Ellipse_Height=5.25071 Ellipse_Width=5.63683
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
VSPAERO settings: Sref=122.6 bref=35.7934 cref=4.19 Xcg=20.7527 Ycg=0 Zcg=0 AlphaStart=0 AlphaEnd=0 AlphaNpts=1 BetaStart=0 BetaEnd=0 BetaNpts=1 MachStart=0.78 MachEnd=0.78 MachNpts=1 ReCref=2.145e+07 Vinf=230.153 Rho=0.316211
